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ϕ(x) := x - 0.05*(x^2 - 20*sin(x + 2) + 1)
ϕ1(x) := d/dx(ϕ(x)) → -0.1*x + 1.0*cos(x + 2) + 1
f(x) := x^2 - 20*sin(x + 2) + 1
a := 0
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b := 3
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x0 := a = 0
ε := 0.001
x1 := ϕ(x0) = 0.859297
Δ1 := |x1 - x0| = 0.859297
Δ1 < ε = 0
ε := 0.001
x2 := ϕ(x1) = 1.05094
Δ2 := |x2 - x1| = 0.191641
Δ2 < ε = 0
root(f(x), x, a, b) = 1.03758
x3 := ϕ(x2) = 1.03624
Δ3 := |x3 - x2| = 0.0146936
Δ3 < ε = 0
x4 := ϕ(x3) = 1.03771
Δ4 := |x4 - x3| = 0.00146278
Δ4 < ε = 0
x5 := ϕ(x4) = 1.03756
Δ5 := |x5 - x4| = 0.000143689
Δ5 < ε = 1
TOL := □  # error: This placeholder is empty.
# Метод Нютона
f2(x) := d/dx(f(x)) → 2*x - 20*cos(x + 2)
x := 1
f1(x) := x^2 - 20*sin(x + 2) + 1
Given
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x^2 - 20*sin(x + 2) + 1 == 0
Xsol := Find(x)
Xsol = 1.03758
