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B := [-0.21; 1.17; 0.81; -0.72]
A := [
    -1.00, 0.28, -0.17, 0.06;
    0.52, -1.00, 0.12, 0.17;
    0.17, -0.18, -0.79, 0.00;
    0.11, 0.22, 0.03, -0.95
] = [-1, 0.28, -0.17, 0.06; 0.52, -1, 0.12, 0.17; 0.17, -0.18, -0.79, 0; 0.11, 0.22, 0.03, -0.95]
D := [
    -1.00, 0.28, -0.17, 0.06, -0.21;
    0.52, -1.00, 0.12, 0.17, 1.17;
    0.17, -0.18, -0.79, 0.00, 0.81;
    0.11, 0.22, 0.03, -0.95, -0.7
]
|A| = 0.622813
aa := rank(A) = 4
dd := rank(D) = 4
# СЛАР має 1 розв'язок
ε := 0.0001
TOL := 0.0001
ORIGIN := 1
# Метод оберненої матриці
A^-1 = [
    -1.192, -0.400303, 0.190121, -0.146917;
    -0.682837, -1.24024, -0.0515162, -0.265063;
    -0.100923, 0.196444, -1.21317, 0.0287791;
    -0.299339, -0.32736, -0.0282268, -1.13012
]
X := A^-1*B = [0.0417436; -1.15856; -0.752357; 0.470671]
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# Пакетна реалізація
X := lsolve(A, B) = [0.0417436; -1.15856; -0.752357; 0.470671]
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Pα(A, n) :=
    for i ∈ 1 .. n
        for j ∈ 1 .. n
            α[i, j] ← 0 if i == j
            α[i, j] ← -A[i, j]/A[i, i] if i ≠ j
    α
Pβ(A, B, n) :=
    for i ∈ 1 .. n
        β[i] ← B[i]/A[i, i]
    β
α := Pα(A, 4) = [
    0, 0.28, -0.17, 0.06;
    0.52, 0, 0.12, 0.17;
    0.21519, -0.227848, 0, 0;
    0.115789, 0.231579, 0.0315789, 0
]
β := Pβ(A, B, 4) = [0.21; -1.17; -1.02532; 0.757895]
# Знаходження норм матриці α
# max норма
normi(α) = 0.81
norm1(α) = 0.850979
# l норма
# Евклідова норма
norme(α) = 0.768671
X0 := β = [0.21; -1.17; -1.02532; 0.757895]
X1 := β + α*X0 = [0.102177; -1.055; -0.713544; 0.478885]
X1 - X0 = [-0.107823; 0.115004; 0.311772; -0.27901]
Δ := vectorize(max(|X1 - X0|))*normi(α)/(1 - normi(α)) = 1.32913
Δ < ε = 0
X2 := β + α*X1 = [0.0646368; -1.12108; -0.76295; 0.502878]
X2 - X1 = [-0.0375407; -0.0660868; -0.0494058; 0.0239933]
Δ := vectorize(max(|X2 - X1|))*normi(α)/(1 - normi(α)) = 0.281738
Δ < ε = 0
X3 := β + α*X2 = [0.0559711; -1.14245; -0.755971; 0.481667]
X3 - X2 = [-0.00866571; -0.021371; 0.00697936; -0.0212113]
Δ := vectorize(max(|X3 - X2|))*normi(α)/(1 - normi(α)) = 0.091108
Δ < ε = 0
X4 := β + α*X3 = [0.047528; -1.14973; -0.752966; 0.475935]
X4 - X3 = [-0.00844305; -0.00727457; 0.00300457; -0.00573207]
Δ := vectorize(max(|X4 - X3|))*normi(α)/(1 - normi(α)) = 0.0359941
Δ < ε = 0
X5 := β + α*X4 = [0.0446364; -1.15473; -0.753126; 0.473367]
X5 - X4 = [-0.00289158; -0.00500429; -0.000159363; -0.00256737]
Δ := vectorize(max(|X5 - X4|))*normi(α)/(1 - normi(α)) = 0.0213341
Δ < ε = 0
Δ < ε = 0
X6 := β + α*X5 = [0.0431083; -1.15669; -0.752608; 0.471869]
X6 - X5 = [-0.00152815; -0.0019592; 0.000517979; -0.00149874]
Δ := vectorize(max(|X6 - X5|))*normi(α)/(1 - normi(α)) = 0.00835237
X7 := β + α*X6 = [0.0423817; -1.15768; -0.75249; 0.471254]
X7 - X6 = [-0.000726556; -0.000987267; 0.000117557; -0.000614296]
Δ := vectorize(max(|X7 - X6|))*normi(α)/(1 - normi(α)) = 0.00420887
Δ < ε = 0
X8 := β + α*X7 = [0.0420484; -1.15815; -0.752421; 0.470945]
X8 - X7 = [-0.000333277; -0.000468133; 6.85993e-5; -0.000309045]
Δ := vectorize(max(|X8 - X7|))*normi(α)/(1 - normi(α)) = 0.00199572
Δ < ε = 0
X9 := β + α*X8 = [0.0418872; -1.15836; -0.752386; 0.4708]
X9 - X8 = [-0.000161282; -0.00021761; 3.49453e-5; -0.000144833]
Δ := vectorize(max(|X9 - X8|))*normi(α)/(1 - normi(α)) = 0.000927705
Δ < ε = 0
X10 := β + α*X9 = [0.0418116; -1.15847; -0.752372; 0.470732]
X10 - X9 = [-7.55615e-5; -0.000104295; 1.48758e-5; -6.79651e-5]
Δ := vectorize(max(|X10 - X9|))*normi(α)/(1 - normi(α)) = 0.000444625
Δ < ε = 0
X11 := β + α*X10 = [0.0417758; -1.15852; -0.752364; 0.4707]
X10 - X9 = [-7.55615e-5; -0.000104295; 1.48758e-5; -6.79651e-5]
Δ := vectorize(max(|X11 - X10|))*normi(α)/(1 - normi(α)) = 0.000209154
Δ < ε = 0
X12 := β + α*X11 = [0.0417588; -1.15854; -0.752361; 0.470685]
X11 - X10 = [-3.58093e-5; -4.90609e-5; 7.5033e-6; -3.24319e-5]
Δ := vectorize(max(|X12 - X11|))*normi(α)/(1 - normi(α)) = 9.90497e-5
Δ < ε = 1
# Початкове наближення
x[:, 1] := β
# Визначення кількості ітерацій
k := (log(ε) - log(vectorize(max(|β|))) + log(1 - normi(α)))/log(normi(α))
k = 52.335
n := trunc(k - 1) = 51
# Формула обчислень за методом ітерацій
i := 1 .. n
x[:, i + 1] := β + α*x[:, i]
x = [
    0.21, 0.102177, 0.0646368, 0.0559711, 0.047528, 0.0446364, 0.0431083, 0.0423817, 0.0420484, 0.0418872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;
    -1.17, -1.055, -1.12108, -1.14245, -1.14973, -1.15473, -1.15669, -1.15768, -1.15815, -1.15836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;
    -1.02532, -0.713544, -0.76295, -0.755971, -0.752966, -0.753126, -0.752608, -0.75249, -0.752421, -0.752386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;
    0.757895, 0.478885, 0.502878, 0.481667, 0.475935, 0.473367, 0.471869, 0.471254, 0.470945, 0.4708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]
# Оцінимо міру обумовленості матриці A
condi(A) = 4.05377
# Встановлення впливу відносної похибки вихідних даних на результат
δ := [0.01, 0.01, 0.01, 0.01; 0.01, 0.01, 0.01, 0.01; 0.01, 0.01, 0.01, 0.01; 0.01, 0.01, 0.01, 0.01]
η := [0.01; 0.01; 0.01; 0.01]
dev := condi(A)*(vectorize(max(|η|))/vectorize(max(|B|)))*normi(δ)/normi(A)/(1 - condi(A)*normi(δ)/normi(A))
dev = 0.000841038
# Відносна похибка у %
r := dev*100 = 0.0841038
# Дослідимо систему на стійкість
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C := eigenvals(A) = [-1.2993; -0.521037; -0.995804; -0.92386]
Перевірка
Re(C[1]) =  # no stored result
|C[1]| = 1.2993
# Система стійка
|C[2]| = 0.521037
Re(C[2]) = -0.521037
|C[3]| = 0.995804
Re(C[3]) = -0.995804
|C[4]| = 0.92386
Re(C[4]) = -0.92386
