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x := 1
y := 1
z := 1
# Пакетна реалізація
Given
x + 3*y + z^2 == 4.16
2*x + 2*y^2 + z == 4.4
3*x - y + 2*z^2 == 2.32
Find(x, y, z) = [1; 1; 0.4]
F(x, y, z) := [x + 3*y + z^2 - 4.16; 2*x + 2*y^2 + z - 4.4; 3*x - y + 2*z^2 - 2.32]
# Зведемо нашу систему рівнянь до функції кількох змінних
ORIGIN := 1
N := 3
i := 1 .. N
λ := 10^-5
U(x, y, z) := sum(F(x, y, z)[i]^2, i = 1 .. N) → (z^2 + x + 3.0*y - 4.16)^2 + (2.0*y^2 + 2.0*x + z - 4.4)^2 + (y - 3.0*x - 2.0*z^2 + 2.32)^2
# Знаходимо градієнт функції кількох змінних
grad_U(x, y, z) := [d/dx(U(x, y, z)); d/dy(U(x, y, z)); d/dz(U(x, y, z))] → [
    28.0*x + 4.0*z + 8.0*y^2 + 14.0*z^2 - 39.84;
    20.0*y + 8.0*y*(2.0*x + z + 2.0*y^2 - 4.4) + 2.0*z^2 - 20.32;
    4.0*x + 2*z + (-8.0*z*(-3.0*x + y + (-2.0*z^2) + 2.32)) + 4.0*y^2 + 4*z*(x + 3.0*y + z^2 - 4.16) - 8.8
]
# Вказуємо початкові значення для розрахунку
x0[i] := 0
x1 := x0 - λ*grad_U(x0[1], x0[2], x0[3]) = [0.0003984; 0.0002032; 8.8e-5]
grad_U(x0[1], x0[2], x0[3]) = [-39.84; -20.32; -8.8]
vectorize(max(|grad_U(x0[1], x0[2], x0[3])|)) = 39.84
grad_U(x1[1], x1[2], x1[3]) = [-39.8285; -20.3231; -8.80133]
vectorize(max(|grad_U(x1[1], x1[2], x1[3])|)) = 39.8285
x2 := x1 - λ*grad_U(x1[1], x1[2], x1[3]) = [0.000796685; 0.000406431; 0.000176013]
grad_U(x2[1], x2[2], x2[3]) = [-39.817; -20.3262; -8.80265]
vectorize(max(|grad_U(x2[1], x2[2], x2[3])|)) = 39.817
x3 := x2 - λ*grad_U(x2[1], x2[2], x2[3]) = [0.00119485; 0.000609693; 0.00026404]
grad_U(x3[1], x3[2], x3[3]) = [-39.8055; -20.3293; -8.80398]
vectorize(max(|grad_U(x3[1], x3[2], x3[3])|)) = 39.8055
x4 := x3 - λ*grad_U(x3[1], x3[2], x3[3]) = [0.00159291; 0.000812985; 0.00035208]
grad_U(x4[1], x4[2], x4[3]) = [-39.794; -20.3323; -8.8053]
vectorize(max(|grad_U(x4[1], x4[2], x4[3])|)) = 39.794
x5 := x4 - λ*grad_U(x4[1], x4[2], x4[3]) = [0.00199085; 0.00101631; 0.000440133]
grad_U(x5[1], x5[2], x5[3]) = [-39.7825; -20.3354; -8.80662]
vectorize(max(|grad_U(x5[1], x5[2], x5[3])|)) = 39.7825
x6 := x5 - λ*grad_U(x5[1], x5[2], x5[3]) = [0.00238867; 0.00121966; 0.000528199]
